// SBML level 2 version 4

model exercise5()

  // Compartments:
  compartment default = 1 volume;

  // Species:
  substanceOnly species A in default = 0.5;
  substanceOnly species B in default = 0.2;
  substanceOnly species C in default = 0.01;
  substanceOnly species D in default = 0.02;
  species E in default = 0;
  species F in default = 0;

  // Reactions:
  re1: A + B => C; k1*A*B;
    k1 = 0.3 substance;
  re2: C => D; C*k2;
    k2 = 0.01 substance;
  re3: D => E + F; k3*D;
    k3 = 0.6 substance;

  // Unit definitions:
  unit substance = mole;
  unit volume = litre;
  unit area = metre^2;
  unit length = metre;
  unit time = second;
end
