// SBML level 2 version 4

model exercise6()

  // Compartments:
  compartment default = 1 volume;

  // Species:
  substanceOnly species MKKK in default = 90;
  substanceOnly species MKKK_P in default = 10;
  substanceOnly species MKK in default = 280;
  substanceOnly species MKK_P in default = 10;
  substanceOnly species MKK_PP in default = 10;
  substanceOnly species MAPK in default = 280;
  substanceOnly species MAPK_P in default = 10;
  species MAPK_PP in default = 0;

  // Reactions:
  re1: MKKK => MKKK_P; v1*MKKK/((1 + MAPK_PP/ki)*(k1 + MKKK));  // modifiers: MAPK_PP
    v1 = 2.5 substance; ki = 9 substance; k1 = 10 substance;
  re2: MKKK_P => MKKK; 0.25*MKKK_P/(8 + MKKK_P);
  re3: MKK => MKK_P; 0.025*MKKK_P*MKK/(15 + MKK);  // modifiers: MKKK_P
  re12: MKK_P => MKK_PP; 0.025*MKKK_P*MKK_P/(15 + MKK_P);  // modifiers: MKKK_P
  re14: MKK_PP => MKK_P; 0.75*MKK_PP/(15 + MKK_PP);
  re15: MKK_P => MKK; 0.75*MKK_P/(15 + MKK_P);
  re16: MAPK => MAPK_P; 0.025*MKK_PP*MAPK/(15 + MAPK);  // modifiers: MKK_PP
  re17: MAPK_P => MAPK_PP; 0.025*MKK_PP*MAPK_P/(15 + MAPK_P);  // modifiers: MKK_PP
  re18: MAPK_PP => MAPK_P; 0.5*MAPK_PP/(MAPK_PP + 15);
  re19: MAPK_P => MAPK; MAPK_P*0.5/(15 + MAPK_P);

  // Unit definitions:
  unit substance = mole;
  unit volume = litre;
  unit area = metre^2;
  unit length = metre;
  unit time = second;
end
