// SBML level 2 version 4

model exercise7()

  // Compartments:
  compartment default = 1 volume;
  compartment nucleus in default = 1 volume;

  // Species:
  substanceOnly species mRNA in default = 0.5;
  substanceOnly species P in nucleus = 0.5;
  substanceOnly species R in default = 0.5;
  species sa8_degraded in default = 0;
  species sa6_degraded in default = 0;
  substanceOnly species $G in nucleus = 0.1;

  // Reactions:
  re5: mRNA => R; 1*mRNA;
  re7: mRNA => sa6_degraded; 1*mRNA;
  re1: P => R; 1*P;
  re6: R => sa8_degraded; 1*R;
  re3: $G => mRNA; 1/(1 + (P/0.01)^40);  // modifiers: P
  re2: R => P; R*0.1;

  // Unit definitions:
  unit substance = mole;
  unit volume = litre;
  unit area = metre^2;
  unit length = metre;
  unit time = second;
end
