// SBML level 2 version 4

model exercise8()

  // Compartments:
  compartment default = 1 volume;
  compartment Cytoplasm in default = 1 volume;
  compartment Nucleus in Cytoplasm = 1 volume;

  // Species:
  species Src in Nucleus = 0;
  substanceOnly species RNAP in Nucleus = 0.66;
  species waste in Nucleus = 0;
  substanceOnly species RNAnuc in Nucleus = 96;
  substanceOnly species mRNAnuc in Nucleus = 0.003;
  substanceOnly species RNAcyt in Cytoplasm = 0.005;
  substanceOnly species mRNAcyt in Cytoplasm = 3.8;
  substanceOnly species P in Cytoplasm = 20;
  species AA in Cytoplasm = 90.465/Cytoplasm;

  // Reactions:
  re1: Src => RNAP; 10/(1 + P/0.6);  // modifiers: P
  re2: RNAP => waste; 1*RNAP;
  re3: RNAnuc => mRNAnuc; 50*RNAP*RNAnuc/(1 + RNAnuc);  // modifiers: RNAP
  re4: mRNAcyt => RNAcyt; 50*mRNAcyt/(mRNAcyt + 1);
  re8: RNAcyt => RNAnuc; 10000*RNAcyt;
  re9: mRNAnuc => mRNAcyt; 10000*mRNAnuc;
  re10: AA => P; 50*mRNAcyt*AA/(AA + 80);  // modifiers: mRNAcyt
  re11: P => AA; 50*P/(P + 1);

  // Unit definitions:
  unit substance = mole;
  unit volume = litre;
  unit area = metre^2;
  unit length = metre;
  unit time = second;
end
